## 2D Panic Evacuation: 225 individuals, room 20x20
#	Loop velocidad de deseo
variable vdmax equal 6
variable vd loop 1 ${vdmax}
label start_of_loop1
#	Loop de iteracion
variable itermax equal 30
variable iter loop 1 ${itermax}
label start_of_loop2

#			INITIAL CONDITIONS
dimension        2
boundary         f f p
units            si
atom_style       sphere
lattice          sq 1.3 origin 0.5 0.5 0.0
region           zona1 block 0 20 0 20 -1 1 units box
region           zona2 block 20.12 40 0 20 -1 1 units box
region           zona3 block 19 21 9.4 10.6 -1 1 units box
region           todas union 3 zona1 zona2 zona3
create_box       1 todas
create_atoms     1 region zona1
set              atom * mass 70.0
set              atom * diameter 0.6
velocity         all create 1e23 ${iter} dist gaussian
comm_modify      vel yes

#			FORCES
pair_style  hybrid/overlay gran/social 0 0 0 240000 0 1 social 0.08 3.5
pair_coeff  * * social 2000 3.5 0.3
pair_coeff  * * gran/social
fix  walls  all wall/region todas social 2000 0.08 3.5
fix  wallg  all wall/region todas granular 240000 120000 0.001
fix  target all social/self 70 ${vd} xy

#			EVACUATED
compute     1 all property/atom x
variable    out atom c_1>20.0
compute     mycompute all reduce sum v_out
variable    evacuados equal c_mycompute

#			VISUALIZE
#dump  3 all movie 200 in.movie_press_onedoor.mpg type type &
#      axes yes 0.8 0.02 view 0 0 zoom 2 adiam 0.6

#			RUN THE PROCESS
atom_modify   sort 0 0.0
timestep      0.0001
fix           1 all nve
thermo_style  custom step c_mycompute

#	Loop de proceso
variable nmax equal 20000
variable n loop ${nmax}
label    start_of_loop3
run      500
if       "${evacuados} > 159" then "jump SELF break"
variable t equal 0.05*$n
next n
jump SELF start_of_loop3
#	Terminación del proceso
label break
print "${vd}  ${iter}  $t" append print.txt
clear
variable n delete
next iter
jump SELF start_of_loop2
#	Terminacion loop de itercion
clear
next vd
jump SELF start_of_loop1
#	Terminación loop velocidad de deseo
